*Heading
** Job name: model_cantilever Model name: model_cantilever
** Generated by: in-house model generator
*Preprint, echo=NO, model=NO, history=NO, contact=NO
**
** PARTS
**
*Part, name=PART-LAYER
*Node
1, 0.25000000, 0.05000000, 0.00100000
2, 0.25000000, 0.04000000, 0.00100000
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*Element, type=SC8R
1, 13, 14, 20, 19, 1, 2, 8, 7
2, 14, 15, 21, 20, 2, 3, 9, 8
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*Nset, nset=LAYER, generate
1, 312, 1
*Elset, elset=LAYER, generate
1, 125, 1
*Orientation, name=Ori-1
1., 0., 0., 0., 1., 0.
3, 0.
** Section: Section-1
*Shell Section, elset=LAYER, material=HYPODRAPE, orientation=Ori-1, controls=EC-1, poisson=0.0, thickness modulus=117000000.0, stack direction=ORIENTATION
1., 11
*Transverse Shear Stiffness
441667.0, 441667.0, 0.0
*End Part
**
*Part, name=Part-Tool1
*End Part
**
*Part, name=Part-Tool2
*End Part
**
**
** ASSEMBLY
**
*Assembly, name=Assembly
**
*Instance, name=LAYER1, part=PART-LAYER
0., 0., 0.0
*End Instance
**
*Nset, nset=SetEndFix, instance=Layer1, generate
301, 312, 1
*Elset, elset=_botlayer1_S5, internal, instance=Layer1, generate
 1, 125
*Surface, type=ELEMENT, name=botlayer1
_botlayer1_S5, S5
*Elset, elset=_toplayer1_S3, internal, instance=Layer1, generate
 1, 125
*Surface, type=ELEMENT, name=toplayer1
_toplayer1_S3, S3
*End Assembly
**
** MATERIALS
**
*Material, name=HYPODRAPE
*Damping, alpha=20.0
*Density
 1385.0,
*Depvar
 9,
*User Material, constants=21
1, 0, 0.0, 1.4307e9, 1.4307e9, 0.0, 0.0, 0.0
0.0, 0.0, 3000000000.0, 1430580003, 4960906, 0.0006114640288674634, 0.24, 1430580003
4960906, 0.0006114640288674634, 0.24, 1000000, 0.0001
**
** ELEMENT CONTROLS
**
*Section Controls, name = EC-1, hourglass=STIFFNESS
10., 10., 10.
**
** BOUNDARY CONDITIONS
**
** Name: FixedEnd Type: Symmetry/Antisymmetry/Encastre
*Boundary
 SetEndFix, ENCASTRE
** ----------------------------------------------------------------
**
** STEP: apply_load
**
*Step, name=apply_load, nlgeom=YES
*Dynamic, Explicit
 , 2.0
*Bulk Viscosity
 0.06, 1.2
**
** LOADS
**
** Name: Load-1   Type: Gravity
*Dload
, GRAV, 9.82, 0., 0., -1.
**
** OUTPUT REQUESTS
**
*Restart, write, number interval=1, time marks=NO
**
** FIELD OUTPUT: F-Output-1
**
*Output, field
*Node Output
 A, RF, U, V
*Element Output, directions=YES
LE, PE, PEEQ, S, SDV
*Contact Output, Variable = ALL
**
** HISTORY OUTPUT: H-Output-1
**
*Output, history, variable=PRESELECT, time interval=0.02
*End Step
