*Heading
** Job name: model_transverse_shear Model name: model_transverse_shear
** Generated by: in-house model generator
*Preprint, echo=NO, model=NO, history=NO, contact=NO
**
** PARTS
**
*Part, name=PART-LAYER
*Node
1, 0.20000000, 0.05000000, 0.00100000
2, 0.20000000, 0.04000000, 0.00100000
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*Element, type=SC8R
1, 13, 14, 20, 19, 1, 2, 8, 7
2, 14, 15, 21, 20, 2, 3, 9, 8
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*Nset, nset=LAYER, generate
1, 252, 1
*Elset, elset=LAYER, generate
1, 100, 1
*Orientation, name=Ori-1
1., 0., 0., 0., 1., 0.
3, 0.
** Section: Section-1
*Shell Section, elset=LAYER, material=HYPODRAPE, orientation=Ori-1, controls=EC-1, poisson=0.0, thickness modulus=117000000.0, stack direction=ORIENTATION
1., 5
*Transverse Shear Stiffness
441667.0, 441667.0, 0.0
*End Part
**
*Part, name=Part-Tool1
*End Part
**
*Part, name=Part-Tool2
*End Part
**
**
** ASSEMBLY
**
*Assembly, name=Assembly
**
*Instance, name=LAYER1, part=PART-LAYER
0., 0., 0.0
*End Instance
**
*Instance, name=LAYER2, part=PART-LAYER
0., 0., 0.001
*End Instance
**
*Instance, name=LAYER3, part=PART-LAYER
0., 0., 0.002
*End Instance
**
*Instance, name=LAYER4, part=PART-LAYER
0., 0., 0.003
*End Instance
**
*Instance, name=LAYER5, part=PART-LAYER
0., 0., 0.004
*End Instance
**
*Instance, name=LAYER6, part=PART-LAYER
0., 0., 0.005
*End Instance
**
*Instance, name=LAYER7, part=PART-LAYER
0., 0., 0.006
*End Instance
**
*Instance, name=LAYER8, part=PART-LAYER
0., 0., 0.007
*End Instance
**
*Instance, name=LAYER9, part=PART-LAYER
0., 0., 0.008
*End Instance
**
*Instance, name=LAYER10, part=PART-LAYER
0., 0., 0.009000000000000001
*End Instance
**
*Instance, name=LAYER11, part=PART-LAYER
0., 0., 0.01
*End Instance
**
*Instance, name=LAYER12, part=PART-LAYER
0., 0., 0.011
*End Instance
**
*Instance, name=LAYER13, part=PART-LAYER
0., 0., 0.012
*End Instance
**
*Instance, name=LAYER14, part=PART-LAYER
0., 0., 0.013000000000000001
*End Instance
**
*Instance, name=LAYER15, part=PART-LAYER
0., 0., 0.014
*End Instance
**
*Instance, name=LAYER16, part=PART-LAYER
0., 0., 0.015
*End Instance
**
*Instance, name=LAYER17, part=PART-LAYER
0., 0., 0.016
*End Instance
**
*Instance, name=LAYER18, part=PART-LAYER
0., 0., 0.017
*End Instance
**
*Node
1, 0.1, 0.025, 0.
*Node
2, 0.1, 0.025, 0.018000000000000002
*Nset, nset=SetRigidBottom, internal, instance=Layer1
7, 8, 9, 10, 11, 12
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*Nset, nset=SetRigidTop, internal, instance=Layer18
1, 2, 3, 4, 5, 6
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*Nset, nset=SETRP1
 1,
*Nset, nset=SETRP2
 2,
*Surface, type=NODE, name=SETRIGIDBOTTOM_CNS_, internal
SETRIGIDBOTTOM, 1.
*Surface, type=NODE, name=SETRIGIDTOP_CNS_, internal
SETRIGIDTOP, 1.
** Constrain: Bottomcouple
*Coupling, constraint name=BOTTOMCOUPLE, ref node=SETRP1, surface=SETRIGIDBOTTOM_CNS_
*Kinematic
*Coupling, constraint name=TOPCOUPLE, ref node=SETRP2, surface=SETRIGIDTOP_CNS_
*Kinematic
*Elset, elset=_botlayer1_S5, internal, instance=Layer1, generate
 1, 100
*Surface, type=ELEMENT, name=botlayer1
_botlayer1_S5, S5
*Elset, elset=_botlayer2_S5, internal, instance=Layer2, generate
 1, 100
*Surface, type=ELEMENT, name=botlayer2
_botlayer2_S5, S5
*Elset, elset=_botlayer3_S5, internal, instance=Layer3, generate
 1, 100
*Surface, type=ELEMENT, name=botlayer3
_botlayer3_S5, S5
*Elset, elset=_botlayer4_S5, internal, instance=Layer4, generate
 1, 100
*Surface, type=ELEMENT, name=botlayer4
_botlayer4_S5, S5
*Elset, elset=_botlayer5_S5, internal, instance=Layer5, generate
 1, 100
*Surface, type=ELEMENT, name=botlayer5
_botlayer5_S5, S5
*Elset, elset=_botlayer6_S5, internal, instance=Layer6, generate
 1, 100
*Surface, type=ELEMENT, name=botlayer6
_botlayer6_S5, S5
*Elset, elset=_botlayer7_S5, internal, instance=Layer7, generate
 1, 100
*Surface, type=ELEMENT, name=botlayer7
_botlayer7_S5, S5
*Elset, elset=_botlayer8_S5, internal, instance=Layer8, generate
 1, 100
*Surface, type=ELEMENT, name=botlayer8
_botlayer8_S5, S5
*Elset, elset=_botlayer9_S5, internal, instance=Layer9, generate
 1, 100
*Surface, type=ELEMENT, name=botlayer9
_botlayer9_S5, S5
*Elset, elset=_botlayer10_S5, internal, instance=Layer10, generate
 1, 100
*Surface, type=ELEMENT, name=botlayer10
_botlayer10_S5, S5
*Elset, elset=_botlayer11_S5, internal, instance=Layer11, generate
 1, 100
*Surface, type=ELEMENT, name=botlayer11
_botlayer11_S5, S5
*Elset, elset=_botlayer12_S5, internal, instance=Layer12, generate
 1, 100
*Surface, type=ELEMENT, name=botlayer12
_botlayer12_S5, S5
*Elset, elset=_botlayer13_S5, internal, instance=Layer13, generate
 1, 100
*Surface, type=ELEMENT, name=botlayer13
_botlayer13_S5, S5
*Elset, elset=_botlayer14_S5, internal, instance=Layer14, generate
 1, 100
*Surface, type=ELEMENT, name=botlayer14
_botlayer14_S5, S5
*Elset, elset=_botlayer15_S5, internal, instance=Layer15, generate
 1, 100
*Surface, type=ELEMENT, name=botlayer15
_botlayer15_S5, S5
*Elset, elset=_botlayer16_S5, internal, instance=Layer16, generate
 1, 100
*Surface, type=ELEMENT, name=botlayer16
_botlayer16_S5, S5
*Elset, elset=_botlayer17_S5, internal, instance=Layer17, generate
 1, 100
*Surface, type=ELEMENT, name=botlayer17
_botlayer17_S5, S5
*Elset, elset=_botlayer18_S5, internal, instance=Layer18, generate
 1, 100
*Surface, type=ELEMENT, name=botlayer18
_botlayer18_S5, S5
*Elset, elset=_toplayer1_S3, internal, instance=Layer1, generate
 1, 100
*Surface, type=ELEMENT, name=toplayer1
_toplayer1_S3, S3
*Elset, elset=_toplayer2_S3, internal, instance=Layer2, generate
 1, 100
*Surface, type=ELEMENT, name=toplayer2
_toplayer2_S3, S3
*Elset, elset=_toplayer3_S3, internal, instance=Layer3, generate
 1, 100
*Surface, type=ELEMENT, name=toplayer3
_toplayer3_S3, S3
*Elset, elset=_toplayer4_S3, internal, instance=Layer4, generate
 1, 100
*Surface, type=ELEMENT, name=toplayer4
_toplayer4_S3, S3
*Elset, elset=_toplayer5_S3, internal, instance=Layer5, generate
 1, 100
*Surface, type=ELEMENT, name=toplayer5
_toplayer5_S3, S3
*Elset, elset=_toplayer6_S3, internal, instance=Layer6, generate
 1, 100
*Surface, type=ELEMENT, name=toplayer6
_toplayer6_S3, S3
*Elset, elset=_toplayer7_S3, internal, instance=Layer7, generate
 1, 100
*Surface, type=ELEMENT, name=toplayer7
_toplayer7_S3, S3
*Elset, elset=_toplayer8_S3, internal, instance=Layer8, generate
 1, 100
*Surface, type=ELEMENT, name=toplayer8
_toplayer8_S3, S3
*Elset, elset=_toplayer9_S3, internal, instance=Layer9, generate
 1, 100
*Surface, type=ELEMENT, name=toplayer9
_toplayer9_S3, S3
*Elset, elset=_toplayer10_S3, internal, instance=Layer10, generate
 1, 100
*Surface, type=ELEMENT, name=toplayer10
_toplayer10_S3, S3
*Elset, elset=_toplayer11_S3, internal, instance=Layer11, generate
 1, 100
*Surface, type=ELEMENT, name=toplayer11
_toplayer11_S3, S3
*Elset, elset=_toplayer12_S3, internal, instance=Layer12, generate
 1, 100
*Surface, type=ELEMENT, name=toplayer12
_toplayer12_S3, S3
*Elset, elset=_toplayer13_S3, internal, instance=Layer13, generate
 1, 100
*Surface, type=ELEMENT, name=toplayer13
_toplayer13_S3, S3
*Elset, elset=_toplayer14_S3, internal, instance=Layer14, generate
 1, 100
*Surface, type=ELEMENT, name=toplayer14
_toplayer14_S3, S3
*Elset, elset=_toplayer15_S3, internal, instance=Layer15, generate
 1, 100
*Surface, type=ELEMENT, name=toplayer15
_toplayer15_S3, S3
*Elset, elset=_toplayer16_S3, internal, instance=Layer16, generate
 1, 100
*Surface, type=ELEMENT, name=toplayer16
_toplayer16_S3, S3
*Elset, elset=_toplayer17_S3, internal, instance=Layer17, generate
 1, 100
*Surface, type=ELEMENT, name=toplayer17
_toplayer17_S3, S3
*Elset, elset=_toplayer18_S3, internal, instance=Layer18, generate
 1, 100
*Surface, type=ELEMENT, name=toplayer18
_toplayer18_S3, S3
*End Assembly
*Amplitude, name=AMPSMOOTH, definition=SMOOTH STEP
0., 0., 1.0, 1.
**
** MATERIALS
**
*Material, name=HYPODRAPE
*Damping, alpha=20.0
*Density
 1385.0,
*Depvar
 9,
*User Material, constants=21
1, 0, 0.0, 10000000000.0, 10000000000.0, 0.0, 0.0, 0.0
0.0, 0.0, 3000000000.0, 543946434.0, 6933171.0, 0.0013680806311035445, 0.24, 543946434.0
6933171.0, 0.0013634015465483192, 0.24, 1000000, 0.0001
**
** INTERACTION PROPERTIES
**
*Surface Interaction, name=GENERAL_CONTACT
*Friction
 0.1,
*Surface Behavior, pressure-overclosure=HARD
*Surface Interaction, name=INTPROP-1
*Cohesive Behavior
5.0e+9, 5557118844.5, 5557118844.5
*Damage Initiation, criterion=QUADU
1.2e-05, 2.04303e-06, 2.04303e-06
*Damage Evolution, type=DISPLACEMENT, softening=TABULAR, MIXED MODE BEHAVIOR=TABULAR
0.000000000000000000e+00,0.000000000000000000e+00,0.000000000000000000e+00,0.000000000000000000e+00
2.226179875333911262e-03,2.672546161126528111e-08,0.000000000000000000e+00,0.000000000000000000e+00
8.845749153130078035e-03,1.069018464450611244e-07,0.000000000000000000e+00,0.000000000000000000e+00
1.968565939084698790e-02,2.405291545013874935e-07,0.000000000000000000e+00,0.000000000000000000e+00
3.446990669427141274e-02,4.276073857802444977e-07,0.000000000000000000e+00,0.000000000000000000e+00
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1.000000000000000000e+00,2.997956969604987417e-03,1.000000000000000000e+00,0.000000000000000000e+00
**
** ELEMENT CONTROLS
**
*Section Controls, name = EC-1, hourglass=STIFFNESS
5., 1., 1.
**
** BOUNDARY CONDITIONS
**
** Name: Disp-BC-1 Type: Displacement/Rotation
*Boundary
SETRP2, 2, 2
** Name: Disp-BC-1 Type: Displacement/Rotation
*Boundary
SETRP2, 4, 4
** Name: Disp-BC-1 Type: Displacement/Rotation
*Boundary
SETRP2, 5, 5
** Name: Disp-BC-1 Type: Displacement/Rotation
*Boundary
SETRP2, 6, 6
** Name: Disp-BC-1 Type: Displacement/Rotation
*Boundary
SETRP1, 1, 1
** Name: Disp-BC-1 Type: Displacement/Rotation
*Boundary
SETRP1, 2, 2
** Name: Disp-BC-1 Type: Displacement/Rotation
*Boundary
SETRP1, 3, 3
** Name: Disp-BC-1 Type: Displacement/Rotation
*Boundary
SETRP1, 4, 4
** Name: Disp-BC-1 Type: Displacement/Rotation
*Boundary
SETRP1, 5, 5
** Name: Disp-BC-1 Type: Displacement/Rotation
*Boundary
SETRP1, 6, 6
** ----------------------------------------------------------------
**
** STEP: apply_load
**
*Step, name=apply_load, nlgeom=YES
*Dynamic, Explicit
 , 1.0
*Bulk Viscosity
 0.06, 1.2
**
** BOUNDARY CONDITIONS
**
** Name: Displacement Type: Displacement/Rotation
*Boundary, amplitude=AmpSmooth
setRP2, 1, 1, 0.003
setRP2, 3, 3, 0.000
**
** INTERACTIONS
**
** Interaction: general_contact
*Contact, op=NEW
*Contact Inclusions, ALL EXTERIOR
*Contact Property Assignment
  ,  , GENERAL_CONTACT
toplayer1, botlayer2, INTPROP-1
toplayer2, botlayer3, INTPROP-1
toplayer3, botlayer4, INTPROP-1
toplayer4, botlayer5, INTPROP-1
toplayer5, botlayer6, INTPROP-1
toplayer6, botlayer7, INTPROP-1
toplayer7, botlayer8, INTPROP-1
toplayer8, botlayer9, INTPROP-1
toplayer9, botlayer10, INTPROP-1
toplayer10, botlayer11, INTPROP-1
toplayer11, botlayer12, INTPROP-1
toplayer12, botlayer13, INTPROP-1
toplayer13, botlayer14, INTPROP-1
toplayer14, botlayer15, INTPROP-1
toplayer15, botlayer16, INTPROP-1
toplayer16, botlayer17, INTPROP-1
toplayer17, botlayer18, INTPROP-1
**
** OUTPUT REQUESTS
**
*Restart, write, number interval=1, time marks=NO
**
** FIELD OUTPUT: F-Output-1
**
*Output, field
*Node Output
 A, RF, U, V
*Element Output, directions=YES
LE, PE, PEEQ, S, SDV
*Contact Output, Variable = ALL
**
** HISTORY OUTPUT: H-Output-2
**
*Output, history, time interval=0.02
*Node Output, nset=setRP2
 RF3, U3, RF1, U1
**
** HISTORY OUTPUT: H-Output-1
**
*Output, history, variable=PRESELECT, time interval=0.02
*End Step
